<?xml version="1.0" ?>
<Node name="root" dt="1" showBoundingTree="0" gravity="0 0 0">
		<GenerateCylinder template="Vec3d" name="Cylinder" radius="0.2" height="1" resHeight="7" resCircumferential="7" resRadial="3" />
        <TetrahedronSetTopologyContainer name="Container1" tetrahedra="@[-1].tetrahedra" position="@[-1].output_position" createTriangleArray="1"/>
        <TetrahedronSetGeometryAlgorithms  drawEdges="1"/>
		<CGLinearSolver iterations="3000" name="linear solver" tolerance="1.0e-9" threshold="1.0e-9" />
		<EulerImplicitSolver name="default12" rayleighStiffness="0.01" />
        <MechanicalObject name="dofs" rest_position="@[-5].output_position"/>
		<MeshMatrixMass name="mass" lumping="1" printMass="0" massDensity="1" />
		<BoxROI box="-0.01 -0.01 -0.01   0.01 0.01 0.01" drawBoxes="1" name="fixedPoint"  />
		<FixedConstraint indices="@fixedPoint.indices" />
		<BoxROI box="-0.2 -0.2  0.99    0.2 0.2 1.01" computeTriangles="1" drawBoxes="1" name="pressurePlane"  />
		<ProjectToLineConstraint direction="1 0 0" origin="0 0 0" indices="15"  />
		<TrianglePressureForceField  showForces="1"  triangleList="@pressurePlane.triangleIndices" pressure="0.01 0 -0.04" />
	    <FastTetrahedralCorotationalForceField poissonRatio="0.45" youngModulus="1" method="polar" />
</Node>
