<?xml version="1.0"?>
<Node name="root" dt="0.05" gravity="0 0 0">
    <!-- Constant force for a deformable -->
    <VisualStyle displayFlags="showBehaviorModels showForceFields" />
    <Node name="BasicDeformableObject">
        <EulerImplicit name="cg_odesolver" printLog="false" />
        <CGLinearSolver iterations="25" name="linear solver" tolerance="1.0e-9" threshold="1.0e-9" />
        <MechanicalObject position="0 0 0  1 0 0  1 1 0  0 1 0" velocity="0 0 0  0 0 0  0 0 0  0 0 0" />
        <UniformMass mass="0.1" />
        <Mesh triangles="0 1 2  0 2 3" />
        <!--		<FixedConstraint indices="2 3"/>-->
        <TriangleFEMForceField name="FEM0" youngModulus="100" poissonRatio="0.3" method="large" />
        <ConstantForceField indices="0 1 2 3" forces="-1 -1 0  1 -1 0  1 1 0  -1 1 0" />
        <Node name="Visu">
            <OglModel name="Visual" color="red" />
            <IdentityMapping input="@.." output="@Visual" />
        </Node>
    </Node>
    <Node name="TorusRigid">
        <EulerImplicitSolver rayleighStiffness="0.01" />
        <CGLinearSolver iterations="25" threshold="0.00000001" tolerance="1e-5"/>
        <MechanicalObject template="Rigid" dx="2" dy="0" dz="0" rx="0" ry="0" rz="0" scale="1.0" />
        <UniformMass />
        <!-- forces for a rigid is composed of two parts translation of the rigid dof [x y z] and a quaternion for the rotation [x y z w] -->
        <ConstantForceField indices="0" forces="0 0.10 0     0 1 0" />
        <Node name="Visu">
            <OglModel name="Visual" fileMesh="mesh/torus.obj" color="gray" scale="0.3" />
            <RigidMapping input="@.." output="@Visual" />
        </Node>
    </Node>
</Node>
